# Метод простих ітерацій
a := -1
b := 1
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ϕ(x) := 1/2*(e^(-2*x) + 1)
f(x) := e^(-2*x) - 2*x + 1
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ϕ1(x) := d/dx(ϕ(x)) → -e^(-2*x)
m := ϕ1(a) = -7.38906
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M := ϕ1(b) = -0.135335
λ := 2/(m + M) = -0.265802
q := |(M - m)/(M - m)| = 1
root(f(x), x, a, b) = 0.639232
ϕ(x) := x - λ*f(x)
ε := 0.001
x0 := (a - b)/2 = -1
x1 := ϕ(x0) = 1.76143
Δ1 := |x1 - x0| = 2.76143
Δ1 > ε = 1
x2 := ϕ(x1) = 1.0987
Δ2 := |x2 - x1| = 0.662739
Δ2 > ε = 1
x3 := ϕ(x2) = 0.809955
Δ3 := |x3 - x2| = 0.28874
Δ3 > ε = 1
x4 := ϕ(x3) = 0.697788
Δ4 := |x4 - x3| = 0.112167
Δ4 > ε = 1
x5 := ϕ(x4) = 0.65848
Δ5 := |x5 - x4| = 0.0393084
Δ5 > ε = 1
x6 := ϕ(x5) = 0.645453
Δ6 := |x6 - x5| = 0.0130271
Δ6 > ε = 1
x7 := ϕ(x6) = 0.641231
Δ7 := |x7 - x6| = 0.00422185
Δ7 > ε = 1
x8 := ϕ(x7) = 0.639873
Δ8 := |x8 - x7| = 0.00135763
Δ8 > ε = 1
x9 := ϕ(x8) = 0.639438
Δ9 := |x9 - x8| = 0.000435465
Δ9 > ε = 0
# Метод Ньютона
f1(x) := d/dx(f(x)) → -2*e^(-2*x) - 2
n := |f1(a)| = 16.7781
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f2(x) := d/dx(f1(x)) → 4*e^(-2*x)
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x0 := a
f(x0)*f2(x0) = 307.061
x0 := b
f(x0)*f2(x0) = -0.468079
N := |f2(b)| = 0.541341
ε0 := sqrt(2*n*ε/N) = 0.248972
x1 := x0 - f(x0)/f1(x0) = 0.619203
Δ1 := |x1 - x0| = 0.380797
Δ1 < ε0 = 0
x2 := x1 - f(x1)/f1(x1) = 0.639143
Δ2 := |x2 - x1| = 0.0199404
Δ2 < ε0 = 1
