x := transpose([0, 1, 2, 3, 4])
y := transpose([4, 2, 8, 46, 140])
i := 1 .. 4
j := 1 .. 4
p := 0, 0.1 .. 4
L(p) := sum(y[i]*product(if(j == i, 1, (p - x[j])/(x[i] - x[j])), j), i)
L(1.7) = 3.932
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