a := 0
b := π/4  # Початок a та кінець b проміжку інтегрування
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f(x) := x*cos(x^3)
# I. Спочатку побудуємо функцію, отримаємо значення інтеграла
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integral(f(x), x = a .. b) = 0.299477
# II. Знаходження кількості точок розбиття
Похибка
R1 := 0.001
g(x) := d^4/dx^4(f(x)) → 81*x^9*cos(x^3) - 396*x^3*cos(x^3) - 24*sin(x^3) + 432*x^6*sin(x^3)
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x := 0.2
p := Maximize(g, x) = -0.770171
g(p) = 126.242
m1 := nthroot(|(b - a)^5*g(p)|/(2880*R1), 4) = 1.90246
m := 2  # Округлення m1 до цілого вверх
# III. Складена формула Сімпсона
h := (b - a)/(2*m)  # Формула для знаходження кроку інтегрування h
h = 0.19635  # Значення мого кроку інтегрування
# Кількість точок розбиття відрізка інтегрування n=2m ( n-будь-яке парне число)
n := 2*m
i := 0, 1 .. n = [0; 1; 2; 3; 4]
x := a + i*h
# Формула для знаходження
# точок розбиття відрізка (a,b)
# Формула для обчислення
# підінтегральної функції
x = [0; 0.19635; 0.392699; 0.589049; 0.785398]
y := vectorize(x*cos(x^3)) = [0; 0.196344; 0.391979; 0.576788; 0.695015]
# Формула Сімпсона
simpson := h/3*(y[0] + y[n] + 2*sum(y[2*i], i = 1 .. m - 1) + 4*sum(y[2*i + 1], i = 0 .. m - 1))
# Результат обчислення
simpson = 0.299204
# Правило Рунге обчислення похибки
m := 4  # Кількість точок розбиття відрізка інтегрування n=2m ( n-будь-яке парне число)
h := (b - a)/(2*m)  # Формула для знаходження кроку інтегрування h
h = 0.0981748  # Значення мого кроку інтегрування
n := 2*m
i := 0, 1 .. n = [0; 1; 2; 3; 4; 5; 6; 7; 8]
x := a + i*h
# Формула для знаходження
# точок розбиття відрізка (a,b)
# Формула для обчислення
# підінтегральної функції
x = [0; 0.0981748; 0.19635; 0.294524; 0.392699; 0.490874; 0.589049; 0.687223; 0.785398]
y := vectorize(x*cos(x^3)) = [0; 0.0981747; 0.196344; 0.294428; 0.391979; 0.487444; 0.576788; 0.651344; 0.695015]
# Формула Сімпсона
Simpson := h/3*(y[0] + y[n] + 2*sum(y[2*i], i = 1 .. m - 1) + 4*sum(y[2*i + 1], i = 0 .. m - 1))
# Результат обчислення
Simpson = 0.299459
R2 := |simpson - Simpson|/15 = 1.70209e-5
