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# Метод Рунге Кутти 4 порядку
ORIGIN := 1
y := 1
a := 0
b := 1
f(x, y) := y^2*e^x - 2*y
N := 5
yRK4 := rkfixed(y, a, b, N, f)
yRK4 = [0, 1; 0.2, 0.818734; 0.4, 0.670326; 0.6, 0.54882; 0.8, 0.449339; 1, 0.367891]
